# Задание 1
x := 2
n := 1
y := (sqrt(x^3 + n) + cos(|n*x - 1|)^2)/(nthroot(x^5 + sin(x) + n, 4)*cos((x + n)*π/4))
y = -1.92924
# Задание 2
x := 7
y := 10
z := -3
p := if(x > y, sin(x) + 3*|y| - z^2, (y + 3)/sqrt(z^2 + 1)*ln(|x + 1|))
p = 8.5485
q := if((x > y) and (x < 1), cos(x) + 2*|y + 1| - z, (x*y + 3)/sqrt(y^2 + 5))
q = 7.12407
w := if(x < y or y ≥ 10, x^2 + 2*(y*x + 1) - z, (x^3*y^2 + 3)*sqrt(z^2 + 7))
w = 194
# Задание 3
x := -2, -1.6 .. 2
n := 7
f(x) := (x^2 - n*x + sin(x))*sqrt(|x - cos(n*x)|)
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x = [-2; -1.6; -1.2; -0.8; -0.4; 0; 0.4; 0.8; 1.2; 1.6; 2]
f(x) = [24.9825; 17.1342; 7.34953; 6.93211; 1.89287; 0; -2.6074; -0.663185; -7.90396; -9.03057; -12.4089]
# Задание 4
A := runif(3, -3, 3)
B := runif(3, -3, 3)
C := runif(3, -3, 3)
n := 3
transpose(A) = [-2.99239, -1.84006, 0.510037]
s := A*B
s = -1.87387
s := A[0]*B[0] + A[1]*B[1] + A[2]*B[2]
s = -1.87387
B1 := -B
transpose(B) = [-0.898151, 1.93703, -1.95523]
V := B1×C
V = [7.04819; 4.67124; 1.39011]
V := [B1[1]*C[2] - B1[2]*C[1]; B1[2]*C[0] - B1[0]*C[2]; B1[0]*C[1] - B1[1]*C[0]]
V = [7.04819; 4.67124; 1.39011]
transpose(C) = [1.26297, -1.17608, -2.45153]
w := (A×B)*C
w = 28.9773
w := -(A[0]*V[0] + A[1]*V[1] + A[2]*V[2])
w = 28.9773
dA := sqrt(A[0]^2 + A[1]^2 + A[2]^2)
dB := sqrt(B[0]^2 + B[1]^2 + B[2]^2)
dC := sqrt(C[0]^2 + C[1]^2 + C[2]^2)
Array := [dA; dB; dC]
Array = [3.5497; 2.89511; 2.99805]
Max := max(Array)
Max = 3.5497
if(Max == dA, "Это A", if(Max == dB, "Это B", "Это C")) = "Это A"
i := 0, 1 .. 9
j := 0, 1 .. 9
M[i, j] := -10 + floor(rnd(20))
M = [
    -8, 9, -8, -10, 0, 2, -7, -1, -9, 5;
    0, 7, 9, 0, -1, 7, 5, 9, 2, -5;
    6, -3, 3, -10, -5, 1, 6, -1, 4, -1;
    4, 1, 4, 1, -7, -2, 0, 5, -7, -1;
    3, -8, -8, 3, -2, 9, -7, 6, -7, 6;
    -7, 4, -5, 3, 4, -8, 6, 0, -2, 8;
    0, -1, 6, -1, 9, 4, -7, 6, 0, -10;
    1, 0, 6, 3, 6, -8, -4, -5, -8, 6;
    2, -5, -10, 6, -6, 1, -8, 5, 0, -2;
    3, -2, 1, 2, 0, 3, -7, -7, -1, -9
]
sum(sum(M[i, j], j = 0 .. 9), i = 0 .. 9) = -29
sum(sum(M[i, j]*(M < 0)[i, j], j = 0 .. 9), i = 0 .. 9) = -241
sum(sum(M[i, j]*(M > 0)[i, j], j = 0 .. 9), i = 0 .. 9) = 212
X := M[:, 0]
Y := transpose(M)[:, 9]
X*Y = -67
X = [-8; 0; 6; 4; 3; -7; 0; 1; 2; 3]
Y = [3; -2; 1; 2; 0; 3; -7; -7; -1; -9]
# Задание 5
f(x) := e^(-(|x|/3))*cos(x)
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# Задание 6
x := -9, -8.75 .. 9
f(x) := if(x < 0, e^x*x^3, e^(-x)*x^3)
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# Задание 7
x := -2*π
s := 0 .. 16
Δx := π/4
x[s] := x + Δx*s
g(x) := sqrt(|x|)*sin(x)
x = [-6.28319; -5.49779; -4.71239; -3.92699; -3.14159; -2.35619; -1.5708; -0.785398; 0; 0.785398; 1.5708; 2.35619; 3.14159; 3.92699; 4.71239; 5.49779; 6.28319]
g(x) = [0; 2.8164; 3.983; 2.8164; 0; -2.8164; -3.983; -2.8164; 0; 2.8164; 3.983; 2.8164; 0; -2.8164; -3.983; -2.8164; 0]
y := g(x)
O := x
filename1 := "X.txt"
filename2 := "Y.txt"
WRITEPRN(filename1) := O
WRITEPRN(filename2) := y
XX := READPRN(filename1)
YY := READPRN(filename2)
YY = [0; 2.816; 3.983; 2.816; 0; -2.816; -3.983; -2.816; 0; 2.816; 3.983; 2.816; 0; -2.816; -3.983; -2.816; 0]
XX = [-6.283; -5.498; -4.712; -3.927; -3.142; -2.356; -1.571; -0.7854; 0; 0.7854; 1.571; 2.356; 3.142; 3.927; 4.712; 5.498; 6.283]
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# Задание 8
x := -3, -2.9 .. 3
q1(x) := e^(-x^2)
q2(x) := d/dx(q1(x))
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# Задание 9
f(x, y) := sin(sqrt(x^2 + y^2))/sqrt(x^2 + y^2)
# [component: inputs f]
# Задание 10
f(x) := x^2 + (x - 2)*sin(x) - 5
x := -4, -3.99 .. 4
root(f(x), x, -5, 0) = -1.32936
root(f(x), x, 0, 5) = 2.19967
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# Задание 11
f(x) := x^2 + x*sin(2*x) - (x - 5)*cos(x)
x := -4, -3.99 .. 4
x1 := -3
res1 := root(f(x1), x1)
res1 = -2.97354
x2 := -2
res2 := root(f(x2), x2)
res2 = -1.93283
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# Задание 12
n := 1
p(x) := x^3 + (4 - n)*x^2 + (3 - 4*n)*x - 3*n
V := [-3*n; 3 - 4*n; 4 - n; 1]
polyroots(V) = [-3; -1; 1]
# Задание 13
A := [n, (n + 1), (n + 2); (n - 3), (n - 2), n; (n - 1), n, (n + 1)]
B := [(6*n + 8); (6*n - 7); (6*n + 2)]
[x; y; z] := A^-1*B
[x; y; z] = [1; 2; 3]
Given
x1 := 0
y1 := 0
z1 := 0
n*x1 + (n + 1)*y1 + (n + 2)*z1 == 6*n + 8
(n - 3)*x1 + (n - 2)*y1 + n*z1 == 6*n - 7
(n - 1)*x1 + n*y1 + (n + 1)*z1 == 6*n + 2
Find(x1, y1, z1) = [1; 2; 3]
# Задание 14
Given
f(x, y) := (x^2/81) + (y^2/16)
x := 5
y := 4
f(x, y) == 1
f1(x, y) := (x - 9)^2 + (y - 2)^2
f1(x, y) == 25
res := Find(x, y)
res = [4.23934; 3.52845]
x := 4
y := -1
Given
f(x, y) == 1
f1(x, y) == 25
res := Find(x, y)
res = [6.9308; -2.55175]
ye1(x) := 4*sqrt(1 - x^2/81)
ye2(x) := -4*sqrt(1 - x^2/81)
yo1(x) := 2 + sqrt(25 - (x - 9)^2)
yo2(x) := 2 - sqrt(25 - (x - 9)^2)
xe := -9, -8.9 .. 9
xo := 4, 4.1 .. 14
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# Задание 15
f(x) := x*sin(x)
x := 0, 0.1 .. 10
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Минимум
x1 := 4
x1 := Minimize(f, x1)
x1 = 4.91318
Максимумы
x2 := 8
x2 := Maximize(f, x2)
x2 = 7.97867
x2 := 2
x2 := Maximize(f, x2)
x2 = 2.02876
