# Координаты прямой BC:
# Координаты прямой AB:
k1 := -0.5
b1 := 10
X_BC := [4; 6]
Y_BC := [8; 7]
X_AB := [4; 4]
Y_AB := [2; 8]
k2 := 0.5
# Координаты прямой CD:
# Координаты прямой CD:
b2 := 0
X_CD := [6; 6]
Y_CD := [7; 3]
X_AD := [4; 6]
Y_AD := [2; 3]
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# Дана трапеция ABCD, в МСК, где AB || CD.
# Найдем точку пересечения прямых
# Построить прямые через BC и AD, найти точку их пересечения → это точка P.
Given
Y_BC[0] == k1*X_BC[0] + b1
Y_BC[1] == k1*X_BC[1] + b1  # уравнения прямых y=kx+b
t := Find(k1, b1)
t = [-0.5; 10]
y == k1*x + b1  # - уравнение прямой BC
Given
Y_AD[1] == k2*X_AD[0] - b2
Y_AD[0] == k2*X_AD[1] + b2
t2 := Find(k2, b2)
t2 = [0.5; -1]
y == k1*x + b2  # - уравнение прямой CD
x := 0
y := 0
Given
y == k1*x + b1
y == k2*x + b2
res := Find(x, y)
res = [10; 5]
Px := res[0]
# - точка пересечения прямых
Px = 10
Py := res[1]
Py = 5
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# Матрица для аффинных преобр
# Исходные координаты:
P := [X_BC[0], X_BC[1], X_AD[0], X_AD[1]; Y_BC[0], Y_BC[1], Y_AD[0], Y_AD[1]; 1, 1, 1, 1] = [4, 6, 4, 6; 8, 7, 2, 3; 1, 1, 1, 1]
# все точки собираются в матрицу
# Матрица перемещения СК на dx и dy:
Ts(dx, dy) := [1, 0, -dx; 0, 1, -dy; 0, 0, 1]
# Матрица поворота объекта:
Rs(φ) := [cos(φ), -sin(φ), 0; sin(φ), cos(φ), 0; 0, 0, 1]
φ := -90
φ_rad := φ*π/180 = -1.5708
# 1. Сместим СК в точку P:
A1 := Ts(Px, Py)*P = [-6, -4, -6, -4; 3, 2, -3, -2; 1, 1, 1, 1]
# 2. Повернем объект на -90 градусов:
A2 := Rs(φ_rad)*A1 = [3, 2, -3, -2; 6, 4, 6, 4; 1, 1, 1, 1]
# 3. Вернем СК в исходное положение:
A3 := Ts(-Px, -Py)*A2 = [13, 12, 7, 8; 11, 9, 11, 9; 1, 1, 1, 1]
# НОВЫЕ КООРДИНАТЫ
# Повернутая на 90 прямая BC:
X_BC_New := [A3[0, 0]; A3[0, 1]]
Y_BC_New := [A3[1, 0]; A3[1, 1]]
# Повернутая на 90 прямая AD:
X_AD_New := [A3[0, 2]; A3[0, 3]]
Y_AD_New := [A3[1, 2]; A3[1, 3]]
# Повернутая на 90 прямая AB:
X_AB_New := [A3[0, 2]; A3[0, 0]]
Y_AB_New := [A3[1, 0]; A3[1, 0]]
# Повернутая на 90 прямая CD:
X_CD_New := [A3[0, 1]; A3[0, 3]]
Y_CD_New := [A3[1, 1]; A3[1, 1]]
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